// SBML level 3 version 1

function Virus_release_kinetic(k, substrateA, substrateB, KmB, substrateC, KmC, substrateD, KmD, substrateE, KmE, substrateF, KmF, substrateG, KmG, substrateH, KmH)
  k*substrateA*substrateB*substrateC*substrateD*substrateE*substrateF*substrateG*substrateH/((substrateB + KmB)*(substrateC + KmC)*(substrateD + KmD)*(substrateE + KmE)*(substrateF + KmF)*(substrateG + KmG)*(substrateH + KmH));
end

function Protein_binding(k, substratea, substrateb)
  k*substratea*substrateb;
end

model MODEL1307270000()
  // Heldt2012 - Influenza Virus Replication
  // The model describes the life cycle of influenza A virus in a mammalian cell including the following steps: attachment of parental virions to the cell membrane, receptor-mediated endocytosis, fusion of the virus envelope with the endosomal membrane, nuclear import of vRNPs, viral transcription and replication, translation of the structural viral proteins, nuclear export of progeny vRNPs and budding of new virions. It also explicitly accounts for the stabilization of cRNA by viral polymerases and NP and the inhibition of vRNP activity by M1 protein binding. In short, the model focuses on the molecular mechanism that controls viral transcription and replication.
  // This model is described in the article:
  // Modeling the intracellular dynamics of influenza virus replication to understand the control of viral RNA synthesis.
  // Heldt FS, Frensing T, Reichl U.
  // J Virol.
  // Abstract:
  // Influenza viruses transcribe and replicate their negative-sense RNA genome inside the nucleus of host cells via three viral RNA species. In the course of an infection, these RNAs show distinct dynamics, suggesting that differential regulation takes place. To investigate this regulation in a systematic way, we developed a mathematical model of influenza virus infection at the level of a single mammalian cell. It accounts for key steps of the viral life cycle, from virus entry to progeny virion release, while focusing in particular on the molecular mechanisms that control viral transcription and replication. We therefore explicitly consider the nuclear export of viral genome copies (vRNPs) and a recent hypothesis proposing that replicative intermediates (cRNA) are stabilized by the viral polymerase complex and the nucleoprotein (NP). Together, both mechanisms allow the model to capture a variety of published data sets at an unprecedented level of detail. Our findings provide theoretical support for an early regulation of replication by cRNA stabilization. However, they also suggest that the matrix protein 1 (M1) controls viral RNA levels in the late phase of infection as part of its role during the nuclear export of viral genome copies. Moreover, simulations show an accumulation of viral proteins and RNA toward the end of infection, indicating that transport processes or budding limits virion release. Thus, our mathematical model provides an ideal platform for a systematic and quantitative evaluation of influenza virus replication and its complex regulation.
  // With the current parameter set, the model reproduces an infection at a multiplicity of infection (MOI) of 10. Figure 2A of the paper is reproduced here, with parameters kDegRnp and kSynP changed to zeros.
  // Initial conditions and parameter changes that were used to obtain specific figures in the article can be found in Table A2.
  // The model has the correct value for kAttLo as 4.55e-04. The value of this parameter mentioned as 4.55e-02 in Table 1 of the paper is incorrect. This is checked with the author.
  // This model is hosted on BioModels Database and identified by: MODEL1307270000 .
  // To cite BioModels Database, please use: BioModels Database: An enhanced, curated and annotated resource for published quantitative kinetic models .
  // To the extent possible under law, all copyright and related or neighbouring rights to this encoded model have been dedicated to the public domain worldwide. Please refer to CC0 Public Domain Dedication for more information.
  // biomodels.db:MODEL1307270000
  // biomodels.db:BIOMD0000000463
  // isDescribedBy pubmed:22593159
  // isDerivedFrom pubmed:9894006
  // hasTaxon taxonomy:40674 taxonomy:11320
  // isVersionOf GO:0019058 GO:0046718 GO:0009814
  // model units - substance: substance, time: time, volume: volume, area: area, length: length, extent: substance

  // Compartments:
  compartment cell = 1 litre;  // GO:0005623

  // Species:
  // free high-affinity binding sites (sites)
  species Bhi in cell = 150;  // substance in mole; hasPart CHEBI:26667
  // virions attached to high-affinity binding sites (virions)
  species VattHi in cell = 0;  // substance in mole; hasPart GO:0019012; isVersionOf GO:0019062
  // virions in the extracellular medium (virions)
  species Vex in cell = 10;  // substance in mole; isVersionOf GO:0019012; occursIn GO:0005576
  // free low-affinity binding sites (sites)
  species Blo in cell = 1000;  // substance in mole
  // virions attached to low-affinity binding sites (virions)
  species VattLo in cell = 0;  // substance in mole; hasPart GO:0019012; isVersionOf GO:0019062
  // virions in endosomes (virions)
  species Ven in cell = 0;  // substance in mole; isVersionOf GO:0019012; occursIn GO:0005768
  // total amount of virions fused with endosomes (virions)
  species Vfus in cell = 0;  // substance in mole; hasPart GO:0010008; hasPart GO:0036338; isVersionOf GO:0039654
  // parental vRNPs in the cytoplasm (virions)
  species VpCyt in cell = 0;  // substance in mole; isVersionOf GO:0030529; occursIn GO:0005737
  // vRNPs in the nucleus (virions)
  species VpNuc in cell = 0;  // substance in mole; isVersionOf GO:0030529; occursIn GO:0005634
  // nascent cRNA (molecules)
  species Rc in cell = 0;  // substance in mole; isVersionOf GO:0001172; isVersionOf GO:0019022
  // viral polymerase complex (molecules)
  species P_Rdrp in cell = 0;  // substance in mole; isVersionOf GO:0031381
  // complex of viral polymerase and cRNA (molecules)
  species RcRdrp in cell = 0;  // substance in mole; hasPart GO:0031381 GO:0019022
  // NP proteins (molecules)
  species P_Np in cell = 0;  // substance in mole; isVersionOf uniprot:P03466
  // M1 proteins (molecules)
  species P_M1 in cell = 0;  // substance in mole; isVersionOf uniprot:P05777
  // M1-vRNP complexes in the nucleus (virions)
  species VpNucM1 in cell = 0;  // substance in mole; hasPart uniprot:P05777 GO:0030529; occursIn GO:0005634
  // M1-vRNP complexes in the cytoplasm (virions)
  species VpCytM1 in cell = 0;  // substance in mole; hasPart uniprot:P05777 GO:0030529; occursIn GO:0005737
  // cRNPs (molecules)
  species Cp in cell = 0;  // substance in mole; isVersionOf GO:0030529
  // nascent vRNA (molecules)
  species Rv in cell = 0;  // substance in mole; isPartOf taxonomy:211044
  // complex of viral polymerase and vRNA (molecules)
  species RvRdrp in cell = 0;  // substance in mole; hasPart GO:0019022 GO:0031381
  // mRNA of segment 1 (molecules)
  species Rm1 in cell = 0;  // substance in mole
  // mRNA of segment 2 (molecules)
  species Rm2 in cell = 0;  // substance in mole
  // mRNA of segment 3 (molecules)
  species Rm3 in cell = 0;  // substance in mole
  // mRNA of segment 4 (molecules)
  species Rm4 in cell = 0;  // substance in mole
  // mRNA of segment 5 (molecules)
  species Rm5 in cell = 0;  // substance in mole
  // mRNA of segment 6 (molecules)
  species Rm6 in cell = 0;  // substance in mole
  // unspliced mRNA of segment 7 (molecules)
  species Rm7 in cell = 0;  // substance in mole
  // unspliced mRNA of segment 8 (molecules)
  species Rm8 in cell = 0;  // substance in mole
  // PB1 proteins (molecules)
  species P_Pb1 in cell = 0;  // substance in mole; isVersionOf uniprot:P16511
  // PB2 proteins (molecules)
  species P_Pb2 in cell = 0;  // substance in mole; isVersionOf uniprot:P03427
  // PA proteins (molecules)
  species P_Pa in cell = 0;  // substance in mole; isVersionOf uniprot:P15659
  // NEP proteins (molecules)
  species P_Nep in cell = 0;  // substance in mole; isVersionOf uniprot:P03508
  // HA proteins (molecules)
  species P_Ha in cell = 0;  // substance in mole; isVersionOf uniprot:P03437
  // NA proteins (molecules)
  species P_Na in cell = 0;  // substance in mole; isVersionOf uniprot:P06820
  // M2 proteins (molecules)
  species P_M2 in cell = 0;  // substance in mole; isVersionOf uniprot:P63231
  // total amount of released virions (virions)
  species Vrel in cell = 0;  // substance in mole; isVersionOf GO:0019012
  // total amount of cRNA in the cell considering all segments (molecules)
  species $total_cRNA in cell;  // substance in mole
  // total amount of cRNA in the cell considering an arbitrary segment (molecules)
  species $total_cRNA_of_a_segment in cell;  // substance in mole
  // total amount of vRNA in the cell considering all segments (molecules)
  species $total_vRNA in cell;  // substance in mole
  // total amount of vRNA in the cell considering an arbitrary segments (molecules)
  species $total_vRNA_of_a_segment in cell;  // substance in mole

  // Parameters:
  // attachment rate of virus particles to high-affinity binding sites (1/(site*h))
  kAttHi = 0.0809;
  // attachment rate of virus particles to low-affinity binding sites (1/(site*h))
  kAttLo = 0.000455;
  // dissociation rate of virions from high-affinity binding sites (1/h)
  var kDisHi;
  // dissociation rate of virions from low-affinity binding sites (1/h)
  var kDisLo;
  // endocytosis rate of virions bound to high-affinity or low-affinity binding sites (1/h)
  kEn = 4.8;
  // fusion rate of virions in late endosomes (1/h)
  kFus = 3.21;
  // degradation rate of virions which do not fuse with the endosomal membrane (1/h)
  var kDegVen;
  // nuclear import rate of cytoplasmic vRNPs which are not bound to M1 (1/h)
  kImp = 6;
  // synthesis rate of proteins (nucleotides/h)
  kSynP = 64800;
  // synthesis rate of vRNAs (1/h)
  kSynV = 13.86;
  // synthesis rate of cRNAs (1/h)
  kSynC = 1.38;
  // binding rate of polymerase complexes to cRNA and vRNA (1/(h*molecule))
  kBindRdrp = 1;
  // binding rate of NP to RdRp-cRNA and RdRp-vRNA complexes (1/(h*molecule))
  kBindNp = 0.000301;
  // binding rate of M1 to nuclear vRNPs (1/(h*molecule))
  kBindM1 = 1.39e-6;
  // combined rate of NEP binding to M1-vRNP complexes and subsequent transport out of the nucleus (1/(molecule*h))
  kExp = 1e-6;
  // fraction of protein synthesis rate and distance between two adjacent ribosomes (1/h)
  var kSynP_Drib;
  // formation rate of functional polymerase complexes from the three subunits (1/(h*molecule^2))
  kRdrp = 1;
  // release rate of progeny virions from the cell (virions/(molecule*h))
  kRel = 0.0037;
  // degradation rate of nascent cRNA and vRNA (1/h)
  kDegR = 36.36;
  // degradation rate of RNPs (1/h)
  kDegRnp = 0.09;
  // degradation rate of mRNA (1/h)
  kDegM = 0.33;
  // degradation rate of RdRp-cRNA and RdRp-vRNA complexes (1/h)
  kDegRrdrp = 4.25;
  // fraction of fusion-competent virions (-)
  Ffus = 0.51;
  // distance between two adjacent ribosomes on an mRNA (nucleotides)
  Drib = 160;
  // fraction of spliced M2 mRNAs compared to total mRNAs of segment 7 (-)
  Fspl7 = 0.02;
  // fraction of spliced NEP mRNAs compared to total mRNAs of segment 8 (-)
  Fspl8 = 0.125;
  // synthesis rate of M1 proteins (1/h)
  var kSynP_M1;
  // synthesis rate of M2 proteins (1/h)
  var kSynP_M2;
  // synthesis rate of NEP proteins (1/h)
  var kSynP_NEP;
  // length of segment 1's mRNA encoding PB2 (nucleotides)
  L1 = 2320;
  // length of segment 2's mRNA encoding PB1 (nucleotides)
  L2 = 2320;
  // length of segment 3's mRNA encoding PA (nucleotides)
  L3 = 2211;
  // length of segment 4's mRNA encoding HA (nucleotides)
  L4 = 1757;
  // length of segment 5's mRNA encoding NP (nucleotides)
  L5 = 1540;
  // length of segment 6's mRNA encoding NA (nucleotides)
  L6 = 1392;
  // length of segment 7's unspliced mRNA encoding M1 (nucleotides)
  L7 = 1005;
  // length of segment 8's unspliced mRNA encoding NS1 (nucleotides)
  L8 = 868;
  // synthesis rate of mRNAs (nucleotides/h)
  kSynM = 250000;
  // synthesis rate of segment 1's mRNA (1/h)
  var kSynM1;
  // synthesis rate of segment 2's mRNA (1/h)
  var kSynM2;
  // synthesis rate of segment 3's mRNA (1/h)
  var kSynM3;
  // synthesis rate of segment 4's mRNA (1/h)
  var kSynM4;
  // synthesis rate of segment 5's mRNA (1/h)
  var kSynM5;
  // synthesis rate of segment 6's mRNA (1/h)
  var kSynM6;
  // synthesis rate of segment 7's mRNA (1/h)
  var kSynM7;
  // synthesis rate of segment 8's mRNA (1/h)
  var kSynM8;
  // equilibrium constant for the attachment of virions to the high-affinity binding sites (1/site)
  kEqHi = 0.0113;
  // equilibrium constant for the attachment of virions to the low-affinity binding sites (1/site)
  kEqLo = 8.33e-5;

  // Assignment rules:
  kSynP_Drib := kSynP/Drib;
  kDisHi := kAttHi/kEqHi;
  kDisLo := kAttLo/kEqLo;
  kDegVen := (1 - Ffus)/Ffus*kFus;
  kSynM5 := kSynM/L5/8;
  kSynM6 := kSynM/L6/8;
  kSynP_M1 := kSynP/Drib*(1 - Fspl7);
  kSynM8 := kSynM/L8/8;
  kSynM2 := kSynM/L2/8;
  kSynM3 := kSynM/L3/8;
  kSynM1 := kSynM/L1/8;
  kSynM4 := kSynM/L4/8;
  kSynP_M2 := kSynP/Drib*Fspl7;
  kSynP_NEP := kSynP/Drib*Fspl8;
  kSynM7 := kSynM/L7/8;
  total_vRNA := 8*(VattHi + VattLo + Ven) + VpCyt + VpNuc + Rv + RvRdrp + VpNucM1 + VpCytM1;
  total_cRNA := Rc + RcRdrp + Cp;
  total_vRNA_of_a_segment := total_vRNA/8;
  total_cRNA_of_a_segment := total_cRNA/8;

  // Reactions:
  reaction_1: Vex + Bhi -> VattHi; cell*(kAttHi*Vex*Bhi - kDisHi*VattHi); reaction_1 is "Binding of virions to high-affinity sites";
  reaction_2: Vex + Blo -> VattLo; cell*(kAttLo*Vex*Blo - kDisLo*VattLo); reaction_2 is "Binding of virions to low-affinity sites";
  reaction_3: VattHi => Ven + Bhi; cell*kEn*VattHi; reaction_3 is "Endocytosis of virions bound to high-affinity sites";
  reaction_4: VattLo => Ven + Blo; cell*kEn*VattLo; reaction_4 is "Endocytosis of virions bound to low-affinity sites";
  Fusion_of_virions_with_endosomes: Ven => Vfus + 8 VpCyt; cell*kFus*Ven;
  reaction_6: Ven => ; cell*kDegVen*Ven; reaction_6 is "Degradation of virions in endosomes";
  Nuclear_import_of_vRNPs: VpCyt => VpNuc; cell*kImp*VpCyt;
  Synthesis_of_cRNA: VpNuc => VpNuc + Rc; cell*kSynC*VpNuc;
  reaction_9: Rc + P_Rdrp => RcRdrp; cell*kBindRdrp*Rc*P_Rdrp; reaction_9 is "Binding of polymerase to nascent cRNA";
  reaction_10: RcRdrp + 71 P_Np => Cp; cell*Protein_binding(kBindNp, RcRdrp, P_Np); reaction_10 is "Binding of NP to RdRp-cRNA complexes";
  reaction_11: VpNuc + 8.5 P_M1 => VpNucM1; cell*Protein_binding(kBindM1, VpNuc, P_M1); reaction_11 is "Binding of M1 to vRNPs in the nucleus";
  Nuclear_export_of_vRNPs: VpNucM1 + P_Nep => VpCytM1; cell*kExp*VpNucM1*P_Nep;
  Synthesis_of_vRNA: Cp => Cp + Rv; cell*kSynV*Cp;
  reaction_14: Rv + P_Rdrp => RvRdrp; cell*kBindRdrp*Rv*P_Rdrp; reaction_14 is "Binding of polymerase to nascent vRNA";
  reaction_15: RvRdrp + 71 P_Np => VpNuc; cell*Protein_binding(kBindNp, RvRdrp, P_Np); reaction_15 is "Binding of NP to RdRp-vRNA complexes";
  Synthesis_of_mRNA_of_segment_1: VpNuc => VpNuc + Rm1; cell*kSynM1*VpNuc;
  Synthesis_of_mRNA_of_segment_2: VpNuc => VpNuc + Rm2; cell*kSynM2*VpNuc;
  Synthesis_of_mRNA_of_segment_3: VpNuc => VpNuc + Rm3; cell*kSynM3*VpNuc;
  Synthesis_of_mRNA_of_segment_4: VpNuc => VpNuc + Rm4; cell*kSynM4*VpNuc;
  Synthesis_of_mRNA_of_segment_5: VpNuc => VpNuc + Rm5; cell*kSynM5*VpNuc;
  Synthesis_of_mRNA_of_segment_6: VpNuc => VpNuc + Rm6; cell*kSynM6*VpNuc;
  Synthesis_of_mRNA_of_segment_7: VpNuc => VpNuc + Rm7; cell*kSynM7*VpNuc;
  Synthesis_of_mRNA_of_segment_8: VpNuc => VpNuc + Rm8; cell*kSynM8*VpNuc;
  Synthesis_of_PB1: Rm2 => Rm2 + P_Pb1; cell*kSynP_Drib*Rm2;
  Synthesis_of_PB2: Rm1 => Rm1 + P_Pb2; cell*kSynP_Drib*Rm1;
  Synthesis_of_PA: Rm3 => Rm3 + P_Pa; cell*kSynP_Drib*Rm3;
  Formation_of_polymerases: P_Pb1 + P_Pb2 + P_Pa => P_Rdrp; cell*kRdrp*P_Pb1*P_Pb2*P_Pa;
  Synthesis_of_NP: Rm5 => Rm5 + P_Np; cell*kSynP_Drib*Rm5;
  Synthesis_of_M1: Rm7 => Rm7 + P_M1; cell*kSynP_M1*Rm7;
  Synthesis_of_NEP: Rm8 => Rm8 + P_Nep; cell*kSynP_NEP*Rm8;
  Synthesis_of_HA: Rm4 => Rm4 + P_Ha; cell*kSynP_Drib*Rm4;
  Synthesis_of_NA: Rm6 => Rm6 + P_Na; cell*kSynP_Drib*Rm6;
  Synthesis_of_M2: Rm7 => Rm7 + P_M2; cell*kSynP_M2*Rm7;
  Virus_release: 8 VpCytM1 + 37 P_Rdrp + 433 P_Np + 2932 P_M1 + 157 P_Nep + 500 P_Ha + 100 P_Na + 40 P_M2 => Vrel; cell*Virus_release_kinetic(kRel, VpCytM1, P_Rdrp, KmB, P_Ha, KmC, P_Np, KmD, P_Na, KmE, P_M1, KmF, P_M2, KmG, P_Nep, KmH);
    KmB = 450; KmC = 5000; KmD = 10000; KmE = 1000; KmF = 30000; KmG = 400; KmH = 1650;
  reaction_35: VpNuc => ; cell*kDegRnp*VpNuc; reaction_35 is "Degradation of vRNPs in the nucleus";
  Degradation_of_nascent_cRNA: Rc => ; cell*kDegR*Rc;
  Degradation_of_nascent_vRNA: Rv => ; cell*kDegR*Rv;
  Degradation_of_RdRp_cRNA: RcRdrp => ; cell*kDegRrdrp*RcRdrp; Degradation_of_RdRp_cRNA is "Degradation of RdRp-cRNA";
  Degradation_of_RdRp_vRNA: RvRdrp => ; cell*kDegRrdrp*RvRdrp; Degradation_of_RdRp_vRNA is "Degradation of RdRp-vRNA";
  Degradation_of_cRNPs: Cp => ; cell*kDegRnp*Cp;
  reaction_41: VpNucM1 => ; cell*kDegRnp*VpNucM1; reaction_41 is "Degradation of M1-vRNP complexes in the nucleus";
  reaction_42: VpCytM1 => ; cell*kDegRnp*VpCytM1; reaction_42 is "Degradation of M1-vRNP complexes in the cytoplasm";
  Degradation_of_mRNA_of_segment_1: Rm1 => ; cell*kDegM*Rm1;
  Degradation_of_mRNA_of_segment_2: Rm2 => ; cell*kDegM*Rm2;
  Degradation_of_mRNA_of_segment_3: Rm3 => ; cell*kDegM*Rm3;
  Degradation_of_mRNA_of_segment_4: Rm4 => ; cell*kDegM*Rm4;
  Degradation_of_mRNA_of_segment_5: Rm5 => ; cell*kDegM*Rm5;
  Degradation_of_mRNA_of_segment_6: Rm6 => ; cell*kDegM*Rm6;
  Degradation_of_mRNA_of_segment_7: Rm7 => ; cell*kDegM*Rm7;
  Degradation_of_mRNA_of_segment_8: Rm8 => ; cell*kDegM*Rm8;

  // Unit definitions:
  unit length = metre;
  unit area = metre^2;
  unit volume = dimensionless;
  unit time = 3600 second;
  unit substance = dimensionless;
end
